m := 0
n := 7
Kou := (m + 1)*(n + 1)/(m + n) = 1.14286
Upr := 1, 1 + 0.1 .. 10
Ri := 0.05*(2*m + 3*n) = 1.05
In := transpose([0, 0.5, 1, 1.5, 2])
Uout(Upr, In) := Kou*Upr - Ri*In
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# График выходного напряжения линейно увеличивается
Uout(1, In) = [1.14286; 0.617857; 0.0928571; -0.432143; -0.957143]
absol(Upr, In) := Uout(Upr, In) - Uout(Upr, 0)
otnos(Upr, In) := absol(Upr, In)/Uout(Upr, 0)*100*%
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otnos(10, In) = [0; -0.0459375; -0.091875; -0.137812; -0.18375]
# при разомкнутой схеме подключение нагрузки In
# вызывает падение выходного напряжения,
# чем больше ток нагрузки, тем больше ошибка.
Kdt := Ri/Kou
gpr := 1, 1 + 0.1 .. 10
Kdt = 0.91875
Uout2(gpr, In) := Kou*gpr + (Kou*Kdt - Ri)*In
Δ(gpr, In) := Uout2(gpr, In) - Uout2(gpr, 0)
otnos2(gpr, In) := Δ(gpr, In)/Uout2(gpr, 0)*100*%
Uout2(10, In) = [11.4286; 11.4286; 11.4286; 11.4286; 11.4286]
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# введение жесткой связи по возмущению позволяет полностью скомпенсировать просадку напряжения
x(gpr, In) := 1/(1/Kou + 1)*gpr - Ri/(1 + Kou)*In
Uout3(gpr, In) := x(gpr, In)
Δ3(gpr, In) := Uout3(gpr, In) - Uout3(gpr, 0)
otnos3(gpr, In) := Δ3(gpr, In)/Uout3(gpr, 0)*100*%
otnos3(10, In) = [0; -0.0459375; -0.091875; -0.137813; -0.18375]
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# введение обратной связи уменьшает ошибку
# от нагрузки по сравнению с обычной разомкнутой
# системой, но не устраняет её полностью
Uout4(gpr, In, Ku) := 1/(1/(Kou*Ku) + 1)*gpr - Ri/(1 + Kou*Ku)*In
Δ4(gpr, In, Ku) := Uout4(gpr, In, Ku) - Uout4(gpr, 0, Ku)
otnos4(gpr, In, Ku) := Δ4(gpr, In, Ku)/Uout4(gpr, 0, Ku)*100*%
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otnos4(10, In, 5) = [0; -0.0091875; -0.018375; -0.0275625; -0.03675]
otnos4(10, In, 25) = [0; -0.0018375; -0.003675; -0.0055125; -0.00735]
otnos4(10, In, 100) = [0; -0.000459375; -0.00091875; -0.00137813; -0.0018375]
otnos4(10, In, 500) = [0; -9.1875e-5; -0.00018375; -0.000275625; -0.0003675]
# Чем больше коэффициент усиления в прямой цепи (Ku -> ∞) замкнутой системы,
# тем меньше установившаяся ошибка от возмущения (просадка напряжения стремится к нулю).
