m := 0
n := 7
R1 := (m + 1)*1*10^3
R2 := (n + 1)*6.8*10^3
C := (m + n + 1)*2.2*10^-9
f := 0, 10 .. 1*10^5
i := sqrt(-1)
W(f) := -R2/R1*1/(1 + (i*2*π*f*R2*C))
-1/(2*π*C*R2*i)
1 + (i*2*π*f*R2*C)
W(f) =  # no stored result
Polus := Im(-1/(2*π*C*R2*i))
Polus = 166.23
W_lg(f) := 20*log(|W(f)|, 10)
φ(f) := arg(W(f))*360/(2*π)
# ЛАЧХ | ФЧХ
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ЛАФЧХ
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W(Polus) = -27.2 + 27.2i
φ(Polus) = 135
W_lg(Polus) - W_lg(0) = -3.0103
Годограф
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