m := 0
n := 7
R1 := (m + 1)*1*10^3
R2 := (n + 1)*6.8*10^3
C := (m + n + 1)*2.2*10^-9
f := 0.1, 10 .. 1*10^5
i := sqrt(-1)
# Апериодическое | Дифференцирующее | Форсирующее
Интегрирующее
# Последовательное соединение интегрирующего и форсирующего звеньев
# Последовательное соединение дифференцирующего и пропорционального звеньев
# Фазовый фильтр
Безынерционное
W3(f) := -R2/R1*1/(1 + (i*2*π*f*R2*C))
-1/(2*π*C*R2*i)
1 + (i*2*π*f*R2*C)
W6(f) := -(i*2*π*f*R2*C + 1)/(i*2*π*f*R1*C)
W7(f) := -(i*2*π*f*R2*C)/(i*2*π*f*R1*C + 1)
W8(f) := (i*2*π*f*R1*C - 1)/(i*2*π*f*R1*C + 1)
W1(f) := -R2/R1
W2(f) := -1/(i*2*π*f*R1*C)
W3(f) =  # no stored result
W4(f) := -i*2*π*f*R2*C
W5(f) := -R2/R1*(1 + i*2*π*f*R1*C)
W4(f) =  # no stored result
W5(f) =  # no stored result
W1(f) =  # no stored result
W1_lg(f) := 20*log(|W1(f)|, 10)
W8(f) =  # no stored result
W6(f) =  # no stored result
W7(f) =  # no stored result
Polus3 := Im(-1/(2*π*C*R2*i))
Polus3 = 166.23
W2(f) =  # no stored result
Nol6 := Im(-1/(2*π*C*R2*i))
Nol6 = 166.23
Nol7 := 0
Nol8 := Im(-1/(2*π*C*R1*i))
Nol8 = 9042.89
Polus2 := 0
φ1(f) := arg(W1(f))*360/(2*π)
Nol4 := 0
Nol5 := Im(-1/(2*π*C*R1*i))
Nol5 = 9042.89
W3_lg(f) := 20*log(|W3(f)|, 10)
φ3(f) := arg(W3(f))*360/(2*π)
Polus6 := 0
Polus8 := Im(-1/(2*π*C*R1*i))
Polus8 = 9042.89
Polus7 := Im(-1/(2*π*C*R1*i))
Polus7 = 9042.89
W2_lg(f) := 20*log(|W2(f)|, 10)
φ2(f) := arg(W2(f))*360/(2*π)
W4_lg(f) := 20*log(|W4(f)|, 10)
φ4(f) := arg(W4(f))*360/(2*π)
W5_lg(f) := 20*log(|W5(f)|, 10)
φ5(f) := arg(W5(f))*360/(2*π)
φ3(Polus3) = 135
|W3(Polus3)| = 38.4666
W6_lg(f) := 20*log(|W6(f)|, 10)
φ6(f) := arg(W6(f))*360/(2*π)
W7_lg(f) := 20*log(|W7(f)|, 10)
φ7(f) := arg(W7(f))*360/(2*π)
W8_lg(f) := 20*log(|W8(f)|, 10)
φ8(f) := arg(W8(f))*360/(2*π)
φ5(Nol5) = -135
|W5(Nol5)| = 76.9332
φ6(Nol6) = 135
φ8(Polus8) = 90
ЛАЧХ
ФЧХ
|W6(Nol6)| = 76.9332
|W8(Polus8)| = 1
φ7(Polus7) = -135
ЛАЧХ
ФЧХ
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ЛАЧХ
ФЧХ
ЛАЧХ
ФЧХ
|W7(Polus7)| = 38.4666
ЛАЧХ
ФЧХ
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ЛАЧХ
ФЧХ
ЛАЧХ
ФЧХ
ЛАЧХ
ФЧХ
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φ8(Nol8) = 90
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|W8(Nol8)| = 1
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# ЛАФЧХ | ЛАФЧХ | ЛАФЧХ
ЛАФЧХ
ЛАФЧХ
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ЛАФЧХ
ЛАФЧХ
ЛАФЧХ
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W3(Polus3) = -27.2 + 27.2i
W5(Nol5) = -54.4 - 54.4i
W6(Nol6) = -54.4 + 54.4i
W7(Polus7) = -27.2 - 27.2i
W8(Polus8) = 1i
φ3(Polus3) = 135
φ5(Nol5) = -135
φ6(Nol6) = 135
φ7(Polus7) = -135
φ8(Polus8) = 90
W3_lg(Polus3) - W3_lg(0) = -3.0103
W5_lg(Nol5) - W5_lg(0) = 3.0103
W8_lg(Polus8) - W8_lg(0) = 0
# Годограф | Годограф | Годограф
Годограф
Годограф
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Годограф
Годограф
Годограф
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W8(f) := (i*2*π*f*R1*C - 1)/(i*2*π*f*R1*C + 1)
W7(f) := -(i*2*π*f*R2*C)/(i*2*π*f*R1*C + 1)
W6(f) := -(i*2*π*f*R2*C + 1)/(i*2*π*f*R1*C)
# Отклик в непрерывной времени
W5(f) := -R2/R1*(1 + i*2*π*f*R1*C)
1/p*((p*R2*C - 1)/(p*R1*C + 1))
W4(f) := -i*2*π*f*R2*C
1/p*(-(p*R2*C)/(p*R1*C + 1))
W2(f) := -1/(i*2*π*f*R1*C)
1/p*(-(p*R2*C + 1)/(p*R1*C))
R2/R1 = 54.4
1/p*(-R2/R1*(1 + p*R1*C))
W1(f) := -R2/R1
1/p*(-p*R2*C)
W3(f) := -R2/R1*1/(1 + (i*2*π*f*R2*C))
-(t + C*R2)/(C*R1)
1/p*(-1/(p*R1*С))
R2*C = 0.00095744
Δ(t) := 0
t_step := 10^-6
t_stop := 5*10^-3
-R2*(C*R1*Δ(t) + 1)/R1
t_step := 10^-6
t_stop := 5*10^-3
t_step := 10^-6
t_stop := 5*10^-3
(R1*e^(-t/(C*R1)) - R1 + R2*e^(-t/(C*R1)))/R1
-R2*e^(-t/(C*R1))/R1
t := 0, t_step .. t_stop
1/p*(-R2/R1)
Δ(t) := 0
t_step := 10^-6
t_stop := 5*10^-3
-C*R2*Δ(t)
t := 0, t_step .. t_stop
t := 0, t_step .. t_stop
-t/(R1*С)
1/p*(-1/R1*R2/(1 + (p*R2*C)))
t := 0, t_step .. t_stop
t_step := 10^-6
t_stop := 5*10^-3
t_step := 10^-6
t_stop := 5*10^-3
U := 1
-R2/R1
t_step := 10^-6
t_stop := 5*10^-3
U := 1
U := 1
t := 0, t_step .. t_stop
t := 0, t_step .. t_stop
U := 1
t := 0, t_step .. t_stop
U := 1
U := 1
t_step := 10^-6
t_stop := 5*10^-3
U := 1
x6(t) := U*(-(t + C*R2)/(C*R1))
W8(0) = -1
R2*(e^(-t/(C*R2)) - 1)/R1
x5(t) := U*(-R2*(C*R1*Δ(t) + 1)/R1)
W6(0) =  # error: Деление на ноль.
W7(0) = 0
t := 0, t_step .. t_stop
x7(t) := U*(-R2*e^(-t/(C*R1))/R1)
x2(t) := U*(-t/(R1*C))
W5(0) = -54.4
x8(t) := U*(R1*e^(-t/(C*R1)) - R1 + R2*e^(-t/(C*R1)))/R1
x1(t) := U*(-R2/R1)
W2(0) =  # error
W4(0) = 0
W1(0) = -54.4
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U := 1
x4(t) := U*(-C*R1*Δ(t))
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W3(0) = -54.4
x3(t) := U*R2*(e^(-t/(C*R2)) - 1)/R1
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L := (m + n + 1)*2.2*10^-3
k := 1/(L*C)
ω0 := 1/sqrt(L*C)
ξ := ω0/2*(L/R2 + R1*C)
W(f, xi) := k/((i*2*π*f)^2 + 2*xi*ω0*(i*2*π*f) + ω0^2)
# ЛАЧХ | ФЧХ
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Годограф
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R1(xi) := (2*xi/ω0 - L/R2)*1/C
R1(0.05) = 81.6176
R1(0.20) = 381.618
R1(0.50) = 981.618
R1(0.75) = 1481.62
R1(1.00) = 1981.62
f_polus := ω0/(2*π) = 9042.89
|W(0, 0.05)| = 1
|W(f_polus, 0.50)| = 1
arg(W(f_polus, 0.50))*360/(2*π) = -90
