m := 0
n := 7
R1 := (m + 1)*1*10^3
R2 := (n + 1)*6.8*10^3
C := (m + n + 1)*2.2*10^-9
R2*C = 0.00095744
f := 0.1, 10 .. 1*10^5
R1 = 1000
i := sqrt(-1)
R2 = 54400
R1*C = 1.76e-5
-R2*R1*C = -0.95744
# Апериодическое | Дифференцирующее | Форсирующее
Интегрирующее
-R2/R1 = -54.4
# Последовательное соединение интегрирующего и форсирующего звеньев
# Фазовый фильтр
Безынерционное
# Последовательное соединение дифференцирующего и пропорционального звеньев
W3(f) := -R2/R1*1/(1 + (i*2*π*f*R2*C))
-1/(2*π*C*R2*i)
1 + (i*2*π*f*R2*C)
W6(f) := -(i*2*π*f*R2*C + 1)/(i*2*π*f*R1*C)
W1(f) := -R2/R1
W7(f) := -(i*2*π*f*R2*C)/(i*2*π*f*R1*C + 1)
W8(f) := (i*2*π*f*R1*C - 1)/(i*2*π*f*R1*C + 1)
W2(f) := -1/(i*2*π*f*R1*C)
W3(f) =  # no stored result
W4(f) := -i*2*π*f*R2*C
W5(f) := -R2/R1*(1 + i*2*π*f*R1*C)
W1(f) =  # no stored result
W4(f) =  # no stored result
W5(f) =  # no stored result
W1_lg(f) := 20*log(|W1(f)|, 10)
W8(f) =  # no stored result
W6(f) =  # no stored result
W7(f) =  # no stored result
Polus3 := Im(-1/(2*π*C*R2*i))
Polus3 = 166.23
W2(f) =  # no stored result
Nol6 := Im(-1/(2*π*C*R2*i))
Nol6 = 166.23
Nol7 := 0
Nol8 := Im(-1/(2*π*C*R1*i))
Nol8 = 9042.89
φ1(f) := arg(W1(f))*360/(2*π)
Polus2 := 0
Nol4 := 0
Nol5 := Im(-1/(2*π*C*R1*i))
Nol5 = 9042.89
W3_lg(f) := 20*log(|W3(f)|, 10)
φ3(f) := arg(W3(f))*360/(2*π)
Polus6 := 0
Polus8 := Im(-1/(2*π*C*R1*i))
Polus8 = 9042.89
Polus7 := Im(-1/(2*π*C*R1*i))
Polus7 = 9042.89
W2_lg(f) := 20*log(|W2(f)|, 10)
φ2(f) := arg(W2(f))*360/(2*π)
W4_lg(f) := 20*log(|W4(f)|, 10)
φ4(f) := arg(W4(f))*360/(2*π)
W5_lg(f) := 20*log(|W5(f)|, 10)
φ5(f) := arg(W5(f))*360/(2*π)
φ3(Polus3) = 135
|W3(Polus3)| = 38.4666
W6_lg(f) := 20*log(|W6(f)|, 10)
φ6(f) := arg(W6(f))*360/(2*π)
W7_lg(f) := 20*log(|W7(f)|, 10)
φ7(f) := arg(W7(f))*360/(2*π)
W8_lg(f) := 20*log(|W8(f)|, 10)
φ8(f) := arg(W8(f))*360/(2*π)
φ5(Nol5) = -135
|W5(Nol5)| = 76.9332
φ6(Nol6) = 135
φ8(Polus8) = 90
ЛАЧХ
ФЧХ
|W6(Nol6)| = 76.9332
|W8(Polus8)| = 1
φ7(Polus7) = -135
ЛАЧХ
ФЧХ
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ЛАЧХ
ФЧХ
ЛАЧХ
ФЧХ
|W7(Polus7)| = 38.4666
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ЛАЧХ
ФЧХ
ЛАЧХ
ФЧХ
ЛАЧХ
ФЧХ
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ЛАЧХ
ФЧХ
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φ8(Nol8) = 90
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|W8(Nol8)| = 1
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# ЛАФЧХ | ЛАФЧХ | ЛАФЧХ
ЛАФЧХ
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ЛАФЧХ
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ЛАФЧХ
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ЛАФЧХ
ЛАФЧХ
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W3(Polus3) = -27.2 + 27.2i
W5(Nol5) = -54.4 - 54.4i
W6(Nol6) = -54.4 + 54.4i
W7(Polus7) = -27.2 - 27.2i
W8(Polus8) = 1i
φ3(Polus3) = 135
φ5(Nol5) = -135
φ6(Nol6) = 135
φ7(Polus7) = -135
φ8(Polus8) = 90
W3_lg(Polus3) - W3_lg(0) = -3.0103
W5_lg(Nol5) - W5_lg(0) = 3.0103
W8_lg(Polus8) - W8_lg(0) = 0
W3(0) = -54.4
# Годограф | Годограф | Годограф
Годограф
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Годограф
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Годограф
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Годограф
Годограф
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# Единичное ступенчатое воздействие | Единичное ступенчатое воздействие
# Отклик в непрерывном времени | Отклик в непрерывном времени
1/p*(-p*R2*C)
1/p*(-1/R1*R2/(1 + (p*R2*C)))
W7(f) := -(p*R2*C)/(p*R1*C + 1)
# Отклик в непрерывном времени
t_step := 10^-6
t_stop := 5*10^-3
W8(f) := (p*R1*C - 1)/(p*R1*C + 1)
W5(f) := -R2*(p*R1*C + 1)/R1
t_step := 10^-6
t_stop := 5*10^-3
# Отклик в непрерывном времени
# Единичное ступенчатое воздействие
t_step := 10^-6
t_stop := 5*10^-3
t := 0, t_step .. t_stop
U := 1
-C*R2*Δ(t)
t := 0, t_step .. t_stop
U := 1
t_step := 10^-6
t_stop := 5*10^-3
t_step4 := 1*10^-6
t_stop4 := 7*10^-3
t := 0, t_step4 .. t_stop4
W6(f) := -(p*R2*C + 1)/(p*R1*C)
t := 0, t_step .. t_stop
U := 1
1/p*(-R2/R1)
1/p*(-1/(p*R1*C))
t_step3 := 1*10^-6
t_stop3 := 7*10^-3
t := 0, t_step3 .. t_stop3
R2*(e^(-t/(C*R2)) - 1)/R1
# Единичное ступенчатое воздействие
t := 0, t_step .. t_stop
U := 1
# Единичное ступенчатое воздействие
# Единичное ступенчатое воздействие
t_step1 := 1*10^-6
t_stop1 := 5*10^-3
t := 0, t_step1 .. t_stop1
1/p*(-R2*(p*R1*C + 1)/R1)
# Единичное ступенчатое воздействие
U := 1
t_step2 := 1*10^-6
t_stop2 := 5*10^-3
t := 0, t_step2 .. t_stop2
1/p*(-(p*R2*C)/(p*R1*C + 1))
-t/(C*R1)
-R2*e^(-t/(C*R1))/R1
1/p*((p*R1*C - 1)/(p*R1*C + 1))
-R2/R1
x3(t) := U*R2*(e^(-t/(C*R2)) - 1)/R1
x4(t) := U*(-C*R2*Δ(t))
-R2*(C*R1*Δ(t) + 1)/R1
1/p*(-(p*R2*C + 1)/(p*R1*C))
x8(t) := U*(2*e^(-t/(C*R1)) - 1)
x5(t) := U*(-R2*(C*R1*Δ(t) + 1)/R1)
x1(t) := U*(-R2/R1)
x2(t) := U*(-t/(C*R1))
# не берется
-(t + C*R2)/(C*R1)
2*e^(-t/(C*R1)) - 1
# стремитися к бесконечности поэтому нет графика
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x7(t) := U*(-R2*e^(-t/(C*R1))/R1)
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# у 7 звена стоит R1 перед С поэтому там все работает, а тут нет
x6(t) := U*(-(t + C*R2)/(C*R1))
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# Линейное воздействие
1/p^2*(-R2*(p*R1*C + 1)/R1)
# Линейное воздействие
# Линейное воздействие | Линейное воздействие
-R2*(t + C*R1)/R1
# Линейное воздействие
1/p^2*(-(p*R2*C)/(p*R1*C + 1))
1/p^2*(-R2/R1)
1/p^2*((p*R1*C - 1)/(p*R1*C + 1))
1/p^2*(-(p*R2*C + 1)/(p*R1*C))
x1(t) := U*(-R2*t/R1)
# Линейное воздействие
x5(t) := U*(-R2*(t + C*R1)/R1)
-R2*t/R1
x7(t) := U*(C*R2*(e^(-t/(C*R1)) - 1))
# Линейное воздействие
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C*R2*(e^(-t/(C*R1)) - 1)
1/p^2*(-p*R1*C)
-(t^2 + 2*C*R2*t)/(2*C*R1)
2*C*R1 - t - 2*C*R1*e^(-t/(C*R1))
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# Линейное воздействие
x8(t) := U*(2*C*R1 - t - 2*C*R1*e^(-t/(C*R1)))
1/p^2*(-R2/R1*1/(p*R2*C + 1))
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-C*R1
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x6(t) := U*(-(t^2 + 2*C*R2*t)/(2*C*R1))
1/p^2*(-1/(p*R1*C))
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x4(t) := U*(-C*R1)
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-t^2/(2*C*R1)
-R2*(t - C*R2 + C*R2*e^(-t/(C*R2)))/R1
x2(t) := U*(-t^2/(2*C*R1))
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x3(t) := U*(-R2*(t - C*R2 + C*R2*e^(-t/(C*R2)))/R1)
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# Импульсное воздействие
# Импульсное воздействие
-R2*(p*R1*C + 1)/R1*1
# Импульсное воздействие
# Импульсное воздействие
-R2/R1*1
# Импульсное воздействие
-(p*R2*C)/(p*R1*C + 1)*1
-R2*(Δ(t) + C*R1*Δ(1, t))/R1
x5(t) := U*(-R2*(Δ(t) + C*R1*Δ(1, t))/R1)
(p*R1*C - 1)/(p*R1*C + 1)*1
# не берется
-(p*R2*C + 1)/(p*R1*C)*1
-R2*Δ(t)/R1
x7(t) := U*(R2*e^(-t/(C*R1)) - C*R1*R2*Δ(t))/(C*R1^2)
x8(t) := U*(-(2*e^(-t/(C*R1)) - C*R1*Δ(t))/(C*R1))
x1(t) := U*(-R2*Δ(t)/R1)
(R2*e^(-t/(C*R1)) - C*R1*R2*Δ(t))/(C*R1^2)
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x6(t) := U*(-(C*R2*Δ(t) + 1)/(C*R1))
-(C*R2*Δ(t) + 1)/(C*R1)
-(2*e^(-t/(C*R1)) - C*R1*Δ(t))/(C*R1)
# не берется
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# не берется
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# Импульсное воздействие
# не берется
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-p*R1*C*1
# Импульсное воздействие
-C*R1*Δ(1, t)
# не берется
-1/(p*R1*C)*1
x4(t) := U*(-C*R1*Δ(1, t))
# Импульсное воздействие
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-1/(C*R1)
-R2/R1*1/(p*R2*C + 1)*1
x3(t) := U*(-1/(C*R1))
-e^(-t/(C*R2))/(C*R1)
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x3(t) := U*(-e^(-t/(C*R2))/(C*R1))
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L := (m + n + 1)*2.2*10^-3
k := 1/(L*C)
ω0 := 1/sqrt(L*C)
ξ := ω0/2*(L/R2 + R1*C)
W(f, xi) := k/((i*2*π*f)^2 + 2*xi*ω0*(i*2*π*f) + ω0^2)
# ЛАЧХ | ФЧХ
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Годограф
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R1(xi) := (2*xi/ω0 - L/R2)*1/C
R1(0.05) = 81.6176
R1(0.20) = 381.618
R1(0.50) = 981.618
R1(0.75) = 1481.62
R1(1.00) = 1981.62
f_polus := ω0/(2*π) = 9042.89
|W(0, 0.05)| = 1
|W(f_polus, 0.50)| = 1
arg(W(f_polus, 0.50))*360/(2*π) = -90
